OpenVSP model (file version 5), 12 components.
Geometry view with OpenVSP parameter names; values to 6 digits, angles in degrees, lengths in the model's unit.
Overall bounding box: X_Min=0 X_Len=132.183 Y_Min=-72.4641 Y_Len=144.928 Z_Min=-7.46813 Z_Len=24.1172

Fuselage "Approximate Fuselage"
  location (X Y Z) 0 0 0, rotation 0 0 0
  bounding box size 132.183 12.703 15.881
  Design: Length=132.183
  cross sections:
    n  XLocPercent  YLocPercent  ZLocPercent  shape
    0  0            0            0            point
    1  0.221917     0            0.0123457    ellipse Ellipse_Height=13.562 Ellipse_Width=12.703
    2  1            0            0.0123457    ellipse Ellipse_Height=13.562 Ellipse_Width=12.6999

Fuselage "Fuselage"
  location (X Y Z) 0 0 0, rotation 0 0 0
  bounding box size 129.183 15.583 13.562
  Design: Length=129.183
  cross sections:
    n  XLocPercent  YLocPercent  ZLocPercent  shape
    0  0            0            0            point
    1  0.0392693    0            0.00155845   ellipse Ellipse_Height=6.45861 Ellipse_Width=5.9698
    2  0.221917     0            0.0123457    ellipse Ellipse_Height=13.0621 Ellipse_Width=12.703
    3  0.494733     0            0.0123457    ellipse Ellipse_Height=13.562 Ellipse_Width=12.703
    4  0.669236     0            0.0123457    ellipse Ellipse_Height=13.562 Ellipse_Width=12.6999
    5  0.936443     0            0.037037     ellipse Ellipse_Height=5.81697 Ellipse_Width=3.74521
    6  1            0            0.0451949    ellipse Ellipse_Height=1.47746 Ellipse_Width=0

Wing "Aero Canards"
  location (X Y Z) 25.2049 0 7.1615, rotation 0 3 0
  symmetric about XZ
  bounding box size 9.83431 39.9775 2.11186
  totals: TotalSpan=40.0248 TotalProjectedSpan=39.9775 TotalChord=5.25132 TotalArea=210.183 TotalAR=7.60385 MAC=5.73887
  root: chord 8.02276, twist 0, NACA 4-series Camber=0 CamberLoc=0.2 ThickChord=0.12
  sections:
    n  Span     Root_Chord  Tip_Chord  Area     Sweep  Sweep_Location  Dihedral  Twist  Twist_Location  tip airfoil
    1  20.0124  8.02276     2.47988    105.091  20     0               2.78571   0      0.25            as above

Wing "Aero Main Wing"
  location (X Y Z) 60 0 -1.06, rotation 0 0 0
  symmetric about XZ
  bounding box size 51.5682 144.928 2.99668
  totals: TotalSpan=145 TotalProjectedSpan=144.928 TotalChord=10.4668 TotalArea=1399.48 TotalAR=15.0086 MAC=10.94
  root: chord 17, twist 0, airfoil file "NASA SC(2)-0612 AIRFOIL"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 BaseThickChord=0.120012 ThickChord=0.120012
  sections:
    n  Span    Root_Chord  Tip_Chord  Area     Sweep  Sweep_Location  Dihedral  Twist  Twist_Location  tip airfoil
    1  6.35    17          17         107.95   31     0.25            3         0      0.25            as above
    2  6.615   17          11.9       95.5868  31     0.25            3         0      0.25            as above
    3  13.23   11.9        10.115     145.629  31     0.25            3         0      0.25            as above
    4  19.845  10.115      8.2943     182.666  31     0.25            0         0      0.25            airfoil file "NASA SC(2)-0610 AIRFOIL"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 BaseThickChord=0.0998002 ThickChord=0.0998002
    5  19.845  8.2943      5.95       141.339  31     0.25            0         0      0.25            airfoil file "NASA SC(2)-0606 AIRFOIL"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 BaseThickChord=0.0600079 ThickChord=0.0600079
    6  6.615   5.95        2.0825     26.5675  43     0.25            0         0      0.25            airfoil file "NASA SC(2)-0404 AIRFOIL"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 BaseThickChord=0.0401097 ThickChord=0.0401097

Wing "Aero Horizontal Tail"
  location (X Y Z) 113.452 0 4.44094, rotation 0 -3 0
  symmetric about XZ
  bounding box size 13.9127 37.6895 1.84398
  totals: TotalSpan=37.6895 TotalProjectedSpan=37.6895 TotalChord=5.34974 TotalArea=201.629 TotalAR=7.0451 MAC=6.3357
  root: chord 9.32711, twist 0, airfoil file "NASA SC(2)-0612 AIRFOIL"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 BaseThickChord=0.120012 Invert=1 ThickChord=0.120012
  sections:
    n  Span     Root_Chord  Tip_Chord  Area     Sweep    Sweep_Location  Dihedral  Twist  Twist_Location  tip airfoil
    1  18.8448  9.32711     1.37238    100.815  33.5584  0               0         0      0.25            NACA 4-series Camber=0 CamberLoc=0.2 ThickChord=0.1

Wing "FM Canards"
  location (X Y Z) 27.5 0 7.1615, rotation 0 3 0
  symmetric about XZ
  bounding box size 7.50417 27.2895 1.5796
  totals: TotalSpan=27.3218 TotalProjectedSpan=27.2895 TotalChord=4.3921 TotalArea=120 TotalAR=6.20597 MAC=4.66961
  root: chord 6.30432, twist 0, NACA 4-series Camber=0 CamberLoc=0.2 ThickChord=0.12
  sections:
    n  Span     Root_Chord  Tip_Chord  Area  Sweep  Sweep_Location  Dihedral  Twist  Twist_Location  tip airfoil
    1  13.6609  6.30432     2.47988    60    20     0               2.78571   0      0.25            as above

Wing "FM Main Wing"
  location (X Y Z) 63.8525 0 -1.06, rotation 0 0 0
  symmetric about XZ
  bounding box size 47.7527 132.246 2.66435
  totals: TotalSpan=132.3 TotalProjectedSpan=132.246 TotalChord=9.16011 TotalArea=1183.58 TotalAR=14.7763 MAC=9.83442
  root: chord 17, twist 0, airfoil file "NASA SC(2)-0612 AIRFOIL"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 BaseThickChord=0.120012 ThickChord=0.120012
  sections:
    n  Span    Root_Chord  Tip_Chord  Area     Sweep  Sweep_Location  Dihedral  Twist  Twist_Location  tip airfoil
    1  6.615   17          11.9       95.5868  31     0.25            3         0      0.25            as above
    2  13.23   11.9        10.115     145.629  31     0.25            3         0      0.25            as above
    3  19.845  10.115      8.2943     182.666  31     0.25            0         0      0.25            airfoil file "NASA SC(2)-0610 AIRFOIL"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 BaseThickChord=0.0998002 ThickChord=0.0998002
    4  19.845  8.2943      5.95       141.339  31     0.25            0         0      0.25            airfoil file "NASA SC(2)-0606 AIRFOIL"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 BaseThickChord=0.0600079 ThickChord=0.0600079
    5  6.615   5.95        2.0825     26.5675  43     0.25            0         0      0.25            airfoil file "NASA SC(2)-0404 AIRFOIL"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 BaseThickChord=0.0401097 ThickChord=0.0401097

Wing "FM Horizontal Tail"
  location (X Y Z) 117.714 0 4.44094, rotation 0 -3 0
  symmetric about XZ
  bounding box size 9.68926 24.9896 1.30037
  totals: TotalSpan=24.9896 TotalProjectedSpan=24.9896 TotalChord=4.00167 TotalArea=100 TotalAR=6.2448 MAC=4.57771
  root: chord 6.63095, twist 0, airfoil file "NASA SC(2)-0612 AIRFOIL"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 BaseThickChord=0.120012 Invert=1 ThickChord=0.120012
  sections:
    n  Span     Root_Chord  Tip_Chord  Area  Sweep    Sweep_Location  Dihedral  Twist  Twist_Location  tip airfoil
    1  12.4948  6.63095     1.37238    50    33.5584  0               0         0      0.25            NACA 4-series Camber=0 CamberLoc=0.2 ThickChord=0.1

Wing "Pylons"
  location (X Y Z) 111.977 0 4.194, rotation 16.1265 0 0
  symmetric about XZ
  bounding box size 16.4187 12.2653 7.06698
  totals: TotalSpan=14.7499 TotalProjectedSpan=12.2073 TotalChord=12.3012 TotalArea=181.441 TotalAR=0.821304 MAC=12.7606
  root: chord 16.4187, twist 0, NACA 4-series Camber=0 CamberLoc=0.2 ThickChord=0.118
  sections:
    n  Span     Root_Chord  Tip_Chord  Area     Sweep    Sweep_Location  Dihedral  Twist  Twist_Location  tip airfoil
    1  7.37493  16.4187     8.1837     90.7204  41.5714  0               34.1448   0      0.25            as above
  SS_Control "Ruddervator": UStart=0.440559 UEnd=0.555944 Length_C_Start=0.107843 Length_C_End=0.107843 Length_Start=1.48497 Length_End=1.17755 LE_Flag=0 Surf_Type=2

Stack "Engines", child of "Pylons"
  location (X Y Z) 116.171 5.77566 11.865, rotation 16.1265 0 0; relative location 116.171 8.844 9.79387, rotation 0 0 0
  symmetric about XZ
  bounding box size 15.3224 17.7008 6.44034
  cross sections:
    n  XDelta   YDelta     ZDelta     shape
    0  0        0          0          circle Circle_Diameter=3.62421
    1  7.31296  -0.150902  -0.290197  circle Circle_Diameter=4.89882
    2  8.00944  -0.290197  0          circle Circle_Diameter=2.33111

Stack "Engine Nacels", child of "Pylons"
  location (X Y Z) 116.333 5.79734 11.7883, rotation 16.1265 0 0; relative location 116.333 8.84354 9.71423, rotation 0 0 0
  symmetric about XZ
  bounding box size 14.8187 21.3162 9.72151
  cross sections:
    n  XDelta   YDelta  ZDelta  ZRotate   shape
    0  0        0       0       0         circle Circle_Diameter=6.25
    1  0        0       0       0         circle Circle_Diameter=6.75
    2  3        0       0       0         circle Circle_Diameter=7.5
    3  11.5323  0       0       -3.85714  circle Circle_Diameter=6.666

Wing "Aero New Main"
  location (X Y Z) 60 0 -1.06, rotation 0 0 0
  symmetric about XZ
  bounding box size 51.1168 142.429 3.02501
  totals: TotalSpan=142.5 TotalProjectedSpan=142.429 TotalChord=10.2749 TotalArea=1353.86 TotalAR=14.9839 MAC=10.681
  root: chord 18, twist 0, airfoil file "NASA SC(2)-0612 AIRFOIL"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 BaseThickChord=0.120012 ThickChord=0.120012
  sections:
    n  Span   Root_Chord  Tip_Chord  Area     Sweep  Sweep_Location  Dihedral  Twist  Twist_Location  tip airfoil
    1  6.35   18          16.2       108.585  31     0.25            3         0      0.25            as above
    2  6.49   16.2        11.016     88.3159  31     0.25            3         0      0.25            as above
    3  12.98  11.016      9.69408    134.408  31     0.25            3         -0.5   0.25            as above
    4  19.47  9.69408     8.33691    175.532  31     0.25            0         -1     0.25            airfoil file "NASA SC(2)-0610 AIRFOIL"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 BaseThickChord=0.0998002 ThickChord=0.0998002
    5  19.47  8.33691     6.3        142.49   31     0.25            0         -2     0.25            as above
    6  6.49   6.3         2.205      27.5987  43     0.25            0         -3     0.25            airfoil file "NASA SC(2)-0606 AIRFOIL"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 BaseThickChord=0.0600079 ThickChord=0.0600079

VSPAERO settings (reference component "Aero New Main"): Sref=1353.86 bref=142.5 cref=10.6811 Xcg=80 Ycg=0 Zcg=0 AlphaStart=0 AlphaEnd=10 AlphaNpts=6 BetaStart=0 BetaEnd=0 BetaNpts=1 MachStart=0.8 MachEnd=0 MachNpts=1 ReCref=1.5e+07 Vinf=236 Rho=0.002
  control group "Ruddervators": DeflectionAngle=0
  control group "Elevators": DeflectionAngle=0
  control group "nards": DeflectionAngle=0
